# Задача 3
# Исходные данные:
m := 9
m[1] := m
m[2] := m
E := 2*10^11
h := 0.012
L := 4.3
l[01] := 1.2
D := 0.21
l[12] := 0.8
d := 0.046
l[23] := 1.2
ρ := 8000
# Задание :
# Определить собственные частоты поперечных колебаний системы (несимметричной), состоящей из 3-х дисков равной массы
# Решение :
Jxx := π*d^4/64 = 2.19787e-7
# Определим податливости:
δ[11] := l[01]^2*(L - l[01])^2/(3*E*Jxx*L) = 2.44042e-5
δ[12] := l[01]^2*(L - l[01])^2/(6*E*Jxx*L)*(2*(L - l[01] - l[12])/(L - l[01]) + (L - l[01] - l[12])/l[01] - (L - l[01] - l[12])^3/(l[01]*(L - l[01])^2)) = 2.86197e-5
δ[13] := l[01]^2*(L - l[01])^2/(6*E*Jxx*L)*(2*(L - l[01] - l[12] - l[23])/(L - l[01]) + (L - l[01] - l[12] - l[23])/l[01] - (L - l[01] - l[12] - l[23])^3/(l[01]*(L - l[01])^2)) = 1.84365e-5
δ[22] := (l[01] + l[12])^2*(L - l[01] - l[12])^2/(3*E*Jxx*L) = 3.7316e-5
δ[21] := (l[01] + l[12])^2*(L - l[01] - l[12])^2/(6*E*Jxx*L)*(2*l[01]/(l[01] + l[12]) + l[01]/(L - l[01] - l[12]) - l[01]^3/((l[01] + l[12])^2*(L - l[01] - l[12]))) = 2.86197e-5
δ[23] := (l[01] + l[12])^2*(L - l[01] - l[12])^2/(6*E*Jxx*L)*(2*(L - l[01] - l[12] - l[23])/(L - l[01] - l[12]) + (L - l[01] - l[12] - l[23])/(l[01] + l[12]) - (L - l[01] - l[12] - l[23])^3/((l[01] + l[12])*(L - l[01] - l[12])^2)) = 2.57614e-5
δ[33] := (l[01] + l[12] + l[23])^2*(L - l[01] - l[12] - l[23])^2/(3*E*Jxx*L) = 2.18507e-5
δ[31] := (l[01] + l[12] + l[23])^2*(L - l[01] - l[12] - l[23])^2/(6*E*Jxx*L)*(2*l[01]/(l[01] + l[12] + l[23]) + l[01]/(L - l[01] - l[12] - l[23]) - l[01]^3/((l[01] + l[12] + l[23])^2*(L - l[01] - l[12] - l[23])))
δ[31] = 1.84365e-5
δ[32] := (l[01] + l[12] + l[23])^2*(L - l[01] - l[12] - l[23])^2/(6*E*Jxx*L)*(2*(l[01] + l[12])/(l[01] + l[12] + l[23]) + (l[01] + l[12])/(L - l[01] - l[12] - l[23]) - (l[01] + l[12])^3/((l[01] + l[12] + l[23])^2*(L - l[01] - l[12] - l[23])))
δ[32] = 2.57614e-5
# Закон парности выполняется:
δ[12] == δ[21] == 2.818*10^-5
δ[13] == δ[31] == 2.183*10^-5
δ[23] == δ[32] == 3.184*10^-5
m := 8.81
Given
det([
    δ[11]*m*p^2 - 1, δ[12]*m*p^2, δ[13]*m*p^2;
    δ[21]*m*p^2, δ[22]*m*p^2 - 1, δ[23]*m*p^2;
    δ[31]*m*p^2, δ[32]*m*p^2, δ[33]*m*p^2 - 1
]) == 0
Find(p) → [-126629/3320, 345257/2224, -417495/1133, -345257/2224, 126629/3320, 417495/1133]
p[1] := 36.2
p[2] := 151.4
p[3] := 392.7
0 == (δ[11]*m*p^2 - 1)*Y[1] + δ[12]*m*Y[2]*p^2 + δ[13]*m*p^2*Y[3]
0 == (δ[21]*m*p^2 - 1)*Y[1] + δ[22]*m*Y[2]*p^2 + δ[23]*m*p^2*Y[3]
0 == (δ[31]*m*p^2 - 1)*Y[1] + δ[32]*m*Y[2]*p^2 + δ[33]*m*p^2*Y[3]
Y[11] := 1
p := p[1]
Given
0 == (δ[22]*m*p^2 - 1)*Y21 + δ[21]*m*Y[11]*p^2 + δ[23]*m*Y31*p^2
0 == (δ[33]*m*p^2 - 1)*Y31 + δ[32]*m*Y21*p^2 + δ[31]*m*Y[11]*p^2
Y21 := 1.37
Find(Y21, Y31) → [0.920570139665; 0.650819280996]
Y31 := 1.18
p := p[2]  # error: Значение должно быть вектором.
Y[12] := 1
p := 151.4
Given
0 == (δ[11]*m*p^2 - 1)*Y[12] + δ[12]*m*Y22*p^2 + δ[13]*m*Y32
0 == (δ[33]*m*p^2 - 1)*Y32 + δ[32]*m*Y22*p^2 + δ[31]*m*Y[12]*p^2
Y22 := -0.63
Find(Y22, Y32) → [-0.679680552519; -0.0548531818928]
Y32 := -0.067
p := p[3]  # error: Значение должно быть вектором.
Y[1] := 1
p := 392.7
Given
0 == (δ[11]*m*p^2 - 1)*Y[1] + δ[12]*m*Y23*p^2 + δ[13]*m*Y33
0 == (δ[33]*m*p^2 - 1)*Y33 + δ[31]*m*Y[1]*p^2 + δ[32]*m*Y23
Y[13] := Y[1] = 1
Find(Y23, Y33) → [-0.826984675; -0.873156029334]
Y23 := -0.77985577101
Y33 := -0.719250799482
# Проверим условие ортогональности :
sqrt(m)*Y[11]*(sqrt(m)*Y[12]) + m*Y21*Y22 + m*(Y31*Y32) = 0.50957  # выполняется
# Задача 4
# Исходные данные:
(задача*3)
θd := 53400*10^-6
# Задание : | определить частоту крутильных колебаний
# Решение :
# модуль сдвига
G := 79.3*10^9  # Па
# полярный момент инерции вала
lp := π*d^4/32
# жесткость вала
c[12] := G*lp/l[12] = 43572.7
c[23] := G*lp/l[23] = 29048.5
# Запишем систему уравнений:
0 + θd*d^2*φ[1]/dt^2 + c[12]*(φ[1] - φ[2]) == 0
-c[12]*(φ[1] - φ[2]) + θd*d^2*φ[2]/dt^2 + c[23]*(φ[2] - φ[3]) == 0
-c[23]*(φ[2] - φ[3]) + θd*d^2*φ[3]/dt^2 + 0 == 0
# Система имеет следующие решения:
φ[1] == Ф[1]*e^ipτ
φ[2] == Ф[2]*e^ipτ
φ[3] == Ф[3]*e^ipτ
# Подставим решения в систему и получим:
0 - p^2*θd*Ф[1] + c[12]*(Ф[1] - Ф[2]) == 0
-c[12]*(Ф[1] - Ф[2]) - p^2*θd*Ф[2] + c[23]*(Ф[2] - Ф[3]) == 0
-c[23]*(Ф[2] - Ф[3]) - p^2*θd*Ф[3] + 0 == 0
# 1 способ (через подбор частот)
1.  # Пусть
Ф1 := 1  # и
p[1] := 5  # тогда
Given
0 - p[1]^2*θd*Ф1 + c[12]*(Ф1 - Ф2) == 0
-c[12]*(Ф1 - Ф2) - p[1]^2*θd*Ф2 + c[23]*(Ф2 - Ф3) == 0
Find(Ф2, Ф3) → [0.999969361546; 0.999877447593]
Ф[2] := 0.999970565712
Ф[3] := 0.999886468984
Δ[1] := -c[23]*(Ф[2] - Ф[3]) - p[1]^2*θd*Ф[3] + 0 = -3.77773
2.  # Пусть
Ф[1] := 1  # и
p[2] := 25  # тогда
Given
0 - p[2]^2*θd*Ф1 + c[12]*(Ф1 - Ф2) == 0
-c[12]*(Ф1 - Ф2) - p[2]^2*θd*Ф2 + c[23]*(Ф2 - Ф3) == 0
Find(Ф2, Ф3) → [0.999234038655; 0.996937034666]
Ф2 := 0.999264142801
Ф3 := 0.997162467211
Δ[2] := -c[23]*(Ф[2] - Ф[3]) - p[2]^2*θd*Ф[3] + 0 = -35.8141
3.  # Пусть
Ф1 := 1  # и
p[3] := 45  # тогда
Given
0 - p[3]^2*θd*Ф1 + c[12]*(Ф1 - Ф2) == 0
-c[12]*(Ф1 - Ф2) - p[3]^2*θd*Ф2 + c[23]*(Ф2 - Ф3) == 0
Find(Ф2, Ф3) → [0.997518285243; 0.990082379334]
Ф2 := 0.997615822675
Ф3 := 0.99081200789
Δ[3] := -c[23]*(Ф[2] - Ф[3]) - p[3]^2*θd*Ф[3] + 0 = -110.566
4.  # Пусть
Ф1 := 1  # и
p[4] := 55  # тогда
Given
0 - p[4]^2*θd*Ф1 + c[12]*(Ф1 - Ф2) == 0
-c[12]*(Ф1 - Ф2) - p[4]^2*θd*Ф2 + c[23]*(Ф2 - Ф3) == 0
Find(Ф2, Ф3) → [0.996292747091; 0.985191603952]
Ф2 := 0.996438451156
Ф3 := 0.986280718216
Δ[4] := -c[23]*(Ф[2] - Ф[3]) - p[4]^2*θd*Ф[3] + 0 = -163.96
5.  # Пусть
Ф1 := 1  # и
p[5] := 60  # тогда
Given
0 - p[5]^2*θd*Ф1 + c[12]*(Ф1 - Ф2) == 0
-c[12]*(Ф1 - Ф2) - p[5]^2*θd*Ф2 + c[23]*(Ф2 - Ф3) == 0
Find(Ф2, Ф3) → [0.995588062654; 0.982381448403]
Ф2 := 0.995761462533
Ф3 := 0.983677020054
Δ[5] := -c[23]*(Ф[2] - Ф[3]) - p[5]^2*θd*Ф[3] + 0 = -194.661
6.  # Пусть
Ф1 := 1  # и
p[6] := 58  # тогда
Given
0 - p[6]^2*θd*Ф1 + c[12]*(Ф1 - Ф2) == 0
-c[12]*(Ф1 - Ф2) - p[6]^2*θd*Ф2 + c[23]*(Ф2 - Ф3) == 0
Find(Ф2, Ф3) → [0.995877289658; 0.983534653743]
Ф2 := 0.996039322211
Ф3 := 0.984745509912
Δ[6] := -c[23]*(Ф[2] - Ф[3]) - p[6]^2*θd*Ф[3] + 0 = -182.06
7.  # Пусть
Ф1 := 1  # и
p[7] := 54  # тогда
Given
0 - p[7]^2*θd*Ф1 + c[12]*(Ф1 - Ф2) == 0
-c[12]*(Ф1 - Ф2) - p[7]^2*θd*Ф2 + c[23]*(Ф2 - Ф3) == 0
Find(Ф2, Ф3) → [0.99642633075; 0.985724479667]
Ф2 := 0.996566784651
Ф3 := 0.986774436466
Δ[7] := -c[23]*(Ф[2] - Ф[3]) - p[7]^2*θd*Ф[3] + 0 = -158.14
8.  # Пусть
Ф1 := 1  # и
p[8] := 54.2  # то
Given
0 - p[8]^2*θd*Ф1 + c[12]*(Ф1 - Ф2) == 0
-c[12]*(Ф1 - Ф2) - p[8]^2*θd*Ф2 + c[23]*(Ф2 - Ф3) == 0
Find(Ф2, Ф3) → [0.996399810104; 0.985618682468]
Ф2 := 0.996541306332
Ф3 := 0.986676413796
Δ[8] := -c[23]*(Ф[2] - Ф[3]) - p[8]^2*θd*Ф[3] + 0 = -159.295
9.  # Пусть
Ф1 := 1  # и
p[9] := 90  # тогда
Given
0 - p[9]^2*θd*Ф1 + c[12]*(Ф1 - Ф2) == 0
-c[12]*(Ф1 - Ф2) - p[9]^2*θd*Ф2 + c[23]*(Ф2 - Ф3) == 0
Find(Ф2, Ф3) → [0.990073140972; 0.960440377683]
Ф2 := 0.990463290698
Ф3 := 0.963345476728
Δ[9] := -c[23]*(Ф[2] - Ф[3]) - p[9]^2*θd*Ф[3] + 0 = -434.934
10.  # Пусть
Ф1 := 1  # и
p[10] := 120  # тогда
Given
0 - p[10]^2*θd*Ф1 + c[12]*(Ф1 - Ф2) == 0
-c[12]*(Ф1 - Ф2) - p[10]^2*θd*Ф2 + c[23]*(Ф2 - Ф3) == 0
Find(Ф2, Ф3) → [0.982352250617; 0.929876167054]
Ф2 := 0.98304585013
Ф3 := 0.935016055071
Δ[10] := -c[23]*(Ф[2] - Ф[3]) - p[10]^2*θd*Ф[3] + 0 = -771.316
11.  # Пусть
Ф1 := 1  # и
p[11] := 95  # тогда
Given
0 - p[11]^2*θd*Ф1 + c[12]*(Ф1 - Ф2) == 0
-c[12]*(Ф1 - Ф2) - p[11]^2*θd*Ф2 + c[23]*(Ф2 - Ф3) == 0
Find(Ф2, Ф3) → [0.988939518182; 0.955941574114]
Ф2 := 0.989374222043
Ф3 := 0.959176152392
Δ[11] := -c[23]*(Ф[2] - Ф[3]) - p[11]^2*θd*Ф[3] + 0 = -484.323
12.
# Пусть
Ф1 := 1  # и
p[12] := 96.5  # тогда
Given
0 - p[12]^2*θd*Ф1 + c[12]*(Ф1 - Ф2) == 0
-c[12]*(Ф1 - Ф2) - p[12]^2*θd*Ф2 + c[23]*(Ф2 - Ф3) == 0
Find(Ф2, Ф3) → [0.988587482348; 0.954545297729]
Ф2 := 0.989036022075
Ф3 := 0.957882097734
Δ[12] := -c[23]*(Ф[2] - Ф[3]) - p[12]^2*θd*Ф[3] + 0 = -499.661
13.  # Пусть
Ф1 := 1  # и
p[13] := 96.6  # тогда
Given
0 - p[13]^2*θd*Ф1 + c[12]*(Ф1 - Ф2) == 0
-c[12]*(Ф1 - Ф2) - p[13]^2*θd*Ф2 + c[23]*(Ф2 - Ф3) == 0
Find(Ф2, Ф3) → [0.988563817206; 0.954451448239]
Ф2 := 0.989013287031
Ф3 := 0.957795118349
Δ[13] := -c[23]*(Ф[2] - Ф[3]) - p[13]^2*θd*Ф[3] + 0 = -500.692
14.  # Пусть
Ф1 := 1  # и
p[14] := 100  # тогда
Given
0 - p[14]^2*θd*Ф1 + c[12]*(Ф1 - Ф2) == 0
-c[12]*(Ф1 - Ф2) - p[14]^2*θd*Ф2 + c[23]*(Ф2 - Ф3) == 0
Find(Ф2, Ф3) → [0.987744618484; 0.9512037655]
Ф2 := 0.988226284813
Ф3 := 0.954785127662
Δ[14] := -c[23]*(Ф[2] - Ф[3]) - p[14]^2*θd*Ф[3] + 0 = -536.382
# 2 способ решения (через определитель)
Ф1 = 1
Given
0 - p^2*θd*Ф1 + c[12]*(Ф1 - Ф2) == 0
-c[12]*(Ф1 - Ф2) - p^2*θd*Ф2 + c[23]*(Ф2 - Ф3) == 0
-c[23]*(Ф2 - Ф3) - p^2*θd*Ф3 + 0 == 0
Find(Ф2, Ф3, p) → [
    1.0, -1.54858377035, 0.215250437022, 0.215250437022, -1.54858377035;
    1.0, 0.548583770355, -1.21525043702, -1.21525043702, 0.548583770355;
    0, 1442.06899271, -800.206589672, 800.206589672, -1442.06899271
]
P1n := 1482.84  # рад/с
P2n := 830.04  # рад/с
# Задача 5
# Исходные данные: | см. предыдущие задачи
ω := 62.8  # рад/с  # (10*Гц)
P[3] := 1  # Н  # величина вынуждающей силы
# Собственные частоты:
p[1] = 5  # рад/с
p[2] = 25  # рад/с
p[3] = 45  # рад/с
# Задание:
# Определить частоту вынужденных колебаний (вынуждающая сила приложена к третьему диску)
# Решение:
# 1 способ решения
# Найдем коэффициент динамичности
λ[1] := 1/(1 - (ω/p[1])^2) = -0.00637944
λ[2] := 1/(1 - (ω/p[2])^2) = -0.188319
λ[3] := 1/(1 - (ω/p[3])^2) = -1.05533
# Амплитуды (из задачи по определению частот собственных колебаний):
u[11] := Y[11] = 1
u[21] := Y21 = 1.37
u[31] := Y31 = 1.18
u[12] := Y[12] = 1
u[22] := Y22 = -0.63
u[32] := Y32 = -0.067
u[13] := Y[13] = 1
u[23] := Y23 = -0.779856
u[33] := Y33 = -0.719251
# Обобщенные массы:
M[1] := m*(u[11]^2 + u[21]^2 + u[31]^2) = 37.6125  # кг
M[2] := m*(u[12]^2 + u[22]^2 + u[32]^2) = 12.3462  # кг
M[3] := m*(u[13]^2 + u[23]^2 + u[33]^2) = 18.7256  # кг
# Определим главные координаты:
q[1] := λ[1]*P[3]*u[31]/(M[1]*p[1]^2) = -8.00556e-6
q[2] := λ[2]*P[3]*u[32]/(M[2]*p[2]^2) = 1.63514e-6
q[3] := λ[3]*P[3]*u[33]/(M[3]*p[3]^2) = 2.00173e-5
# Находим формы вынужденных колебаний:
y[1] := q[1]*u[11] + q[2]*u[12] + q[3]*u[13] = 1.36469e-5  # м
y[2] := q[1]*u[21] + q[2]*u[22] + q[3]*u[23] = -2.76084e-5  # м
y[3] := q[1]*u[31] + q[2]*u[32] + q[3]*u[33] = -2.39536e-5  # м
# 2 способ решения
# Податливости системы:
δ[11] := l[01]^2*(L - l[01])^2*P[3]/(3*E*Jxx*L) = 2.44042e-5
δ[12] := l[01]^2*(L - l[01])^2*P[3]/(6*E*Jxx*L)*(2*(L - l[01] - l[12])/(L - l[01]) + (L - l[01] - l[12])/l[01] - (L - l[01] - l[12])^3/(l[01]*(L - l[01])^2)) = 2.86197e-5
δ[13] := l[01]^2*(L - l[01])^2*P[3]/(6*E*Jxx*L)*(2*(L - l[01] - l[12] - l[23])/(L - l[01]) + (L - l[01] - l[12] - l[23])/l[01] - (L - l[01] - l[12] - l[23])^3/(l[01]*(L - l[01])^2)) = 1.84365e-5
δ[22] := (l[01] + l[12])^2*(L - l[01] - l[12])^2*P[3]/(3*E*Jxx*L) = 3.7316e-5
δ[21] := (l[01] + l[12])^2*(L - l[01] - l[12])^2*P[3]/(6*E*Jxx*L)*(2*l[01]/(l[01] + l[12]) + l[01]/(L - l[01] - l[12]) - l[01]^3/((l[01] + l[12])^2*(L - l[01] - l[12]))) = 2.86197e-5
δ[23] := (l[01] + l[12])^2*(L - l[01] - l[12])^2*P[3]/(6*E*Jxx*L)*(2*(L - l[01] - l[12] - l[23])/(L - l[01] - l[12]) + (L - l[01] - l[12] - l[23])/(l[01] + l[12]) - (L - l[01] - l[12] - l[23])^3/((l[01] + l[12])*(L - l[01] - l[12])^2)) = 2.57614e-5
δ[33] := (l[01] + l[12] + l[23])^2*(L - l[01] - l[12] - l[23])^2*P[3]/(3*E*Jxx*L) = 2.18507e-5
δ[31] := (l[01] + l[12] + l[23])^2*(L - l[01] - l[12] - l[23])^2*P[3]/(6*E*Jxx*L)*(2*l[01]/(l[01] + l[12] + l[23]) + l[01]/(L - l[01] - l[12] - l[23]) - l[01]^3/((l[01] + l[12] + l[23])^2*(L - l[01] - l[12] - l[23])))
δ[31] = 1.84365e-5
δ[32] := (l[01] + l[12] + l[23])^2*(L - l[01] - l[12] - l[23])^2*P[3]/(6*E*Jxx*L)*(2*(l[01] + l[12])/(l[01] + l[12] + l[23]) + (l[01] + l[12])/(L - l[01] - l[12] - l[23]) - (l[01] + l[12])^3/((l[01] + l[12] + l[23])^2*(L - l[01] - l[12] - l[23])))
δ[32] = 2.57614e-5
Given
det([
    δ[11]*m*ω^2 - 1, δ[12]*m*ω^2, δ[13]*m*ω^2;
    δ[21]*m*ω^2, δ[22]*m*ω^2 - 1, δ[23]*m*ω^2;
    δ[31]*m*ω^2, δ[32]*m*ω^2, δ[33]*m*ω^2 - 1
]) → 1.38943660297
Δ := 1.62289834901
det([
    δ[13]*P[3], δ[12]*m*ω^2, δ[13]*m*ω^2;
    δ[23]*P[3], δ[22]*m*ω^2 - 1, δ[23]*m*ω^2;
    δ[33]*P[3], δ[32]*m*ω^2, δ[33]*m*ω^2 - 1
]) → 2.0149755143e-5
Δ1 := 2.37428814475e-5
det([
    δ[11]*m*ω^2 - 1, δ[13]*P[3], δ[13]*m*ω^2;
    δ[21]*m*ω^2, δ[23]*P[3], δ[23]*m*ω^2;
    δ[31]*m*ω^2, δ[33]*P[3], δ[33]*m*ω^2 - 1
]) → 2.22507566e-5
Δ2 := 2.80885352131e-5
det([
    δ[11]*m*ω^2 - 1, δ[12]*m*ω^2, δ[13]*P[3];
    δ[21]*m*ω^2, δ[22]*m*ω^2 - 1, δ[23]*P[3];
    δ[31]*m*ω^2, δ[32]*m*ω^2, δ[33]*P[3]
]) → 1.02319277141e-5
Δ3 := 1.70579861286e-5
# Получим:
Y1 := Δ1/Δ = 1.46299e-5
Y2 := Δ2/Δ = 1.73076e-5
Y3 := Δ3/Δ = 1.05108e-5
