# Задача 3
# Исходные данные:
m := 8.81
m[1] := m
l[23] := 1.1
m[3] := m
m[2] := m
E := 2*10^11
L := 4.4
h := 0.012
D := 0.22
l[01] := 1.1
d := 0.046
ρ := 8000
l[12] := 0.77
# Задание :
# Определить собственные частоты поперечных колебаний системы (несимметричной), состоящей из 3-х дисков равной массы
# Решение :
Jxx := π*d^4/64 = 2.19787e-7
# Определим податливости:
δ[11] := l[01]^2*(L - l[01])^2/(3*E*Jxx*L) = 2.27095e-5
δ[12] := l[01]^2*(L - l[01])^2/(6*E*Jxx*L)*(2*(L - l[01] - l[12])/(L - l[01]) + (L - l[01] - l[12])/l[01] - (L - l[01] - l[12])^3/(l[01]*(L - l[01])^2)) = 2.81762e-5
δ[13] := l[01]^2*(L - l[01])^2/(6*E*Jxx*L)*(2*(L - l[01] - l[12] - l[23])/(L - l[01]) + (L - l[01] - l[12] - l[23])/l[01] - (L - l[01] - l[12] - l[23])^3/(l[01]*(L - l[01])^2)) = 2.18302e-5
δ[22] := (l[01] + l[12])^2*(L - l[01] - l[12])^2/(3*E*Jxx*L) = 3.85762e-5
δ[21] := (l[01] + l[12])^2*(L - l[01] - l[12])^2/(6*E*Jxx*L)*(2*l[01]/(l[01] + l[12]) + l[01]/(L - l[01] - l[12]) - l[01]^3/((l[01] + l[12])^2*(L - l[01] - l[12]))) = 2.81762e-5
δ[23] := (l[01] + l[12])^2*(L - l[01] - l[12])^2/(6*E*Jxx*L)*(2*(L - l[01] - l[12] - l[23])/(L - l[01] - l[12]) + (L - l[01] - l[12] - l[23])/(l[01] + l[12]) - (L - l[01] - l[12] - l[23])^3/((l[01] + l[12])*(L - l[01] - l[12])^2)) = 3.18415e-5
δ[33] := (l[01] + l[12] + l[23])^2*(L - l[01] - l[12] - l[23])^2/(3*E*Jxx*L) = 3.10871e-5
δ[31] := (l[01] + l[12] + l[23])^2*(L - l[01] - l[12] - l[23])^2/(6*E*Jxx*L)*(2*l[01]/(l[01] + l[12] + l[23]) + l[01]/(L - l[01] - l[12] - l[23]) - l[01]^3/((l[01] + l[12] + l[23])^2*(L - l[01] - l[12] - l[23]))) = 2.18302e-5
δ[32] := (l[01] + l[12] + l[23])^2*(L - l[01] - l[12] - l[23])^2/(6*E*Jxx*L)*(2*(l[01] + l[12])/(l[01] + l[12] + l[23]) + (l[01] + l[12])/(L - l[01] - l[12] - l[23]) - (l[01] + l[12])^3/((l[01] + l[12] + l[23])^2*(L - l[01] - l[12] - l[23]))) = 3.18415e-5
# Закон парности выполняется:
δ[12] == δ[21] == 2.818*10^-5
δ[13] == δ[31] == 2.183*10^-5
δ[23] == δ[32] == 3.184*10^-5
m := 8.81
Given
det([
    δ[11]*m*p^2 - 1, δ[12]*m*p^2, δ[13]*m*p^2;
    δ[21]*m*p^2, δ[22]*m*p^2 - 1, δ[23]*m*p^2;
    δ[31]*m*p^2, δ[32]*m*p^2, δ[33]*m*p^2 - 1
]) == 0
Find(p) → [-36.1864986222, 151.363917448, -392.685697072, -151.363917448, 36.1864986222, 392.685697072]
p[1] := 36.2
p[2] := 151.4
p[3] := 392.7
0 == (δ[11]*m*p^2 - 1)*Y[1] + δ[12]*m*Y[2]*p^2 + δ[13]*m*p^2*Y[3]
0 == (δ[21]*m*p^2 - 1)*Y[1] + δ[22]*m*Y[2]*p^2 + δ[23]*m*p^2*Y[3]
0 == (δ[31]*m*p^2 - 1)*Y[1] + δ[32]*m*Y[2]*p^2 + δ[33]*m*p^2*Y[3]
Y[11] := 1
p := p[1]
Given
0 == (δ[22]*m*p^2 - 1)*Y21 + δ[21]*m*Y[11]*p^2 + δ[23]*m*Y31*p^2
0 == (δ[33]*m*p^2 - 1)*Y31 + δ[32]*m*Y21*p^2 + δ[31]*m*Y[11]*p^2
Y21 := 1.37
Find(Y21, Y31) → [1.3663168202; 1.17657080125]
Y31 := 1.18
p := p[2]  # error: Значение должно быть вектором.
Y[12] := 1
p := 151.4
Given
0 == (δ[11]*m*p^2 - 1)*Y[12] + δ[12]*m*Y22*p^2 + δ[13]*m*Y32
0 == (δ[33]*m*p^2 - 1)*Y32 + δ[32]*m*Y22*p^2 + δ[31]*m*Y[12]*p^2
Y22 := -0.63
Find(Y22, Y32) → [-0.630232186108; -0.067441891238]
Y32 := -0.067
p := p[3]  # error: Значение должно быть вектором.
Y[1] := 1
p := 392.7
Given
0 == (δ[11]*m*p^2 - 1)*Y[1] + δ[12]*m*Y23*p^2 + δ[13]*m*Y33
0 == (δ[33]*m*p^2 - 1)*Y33 + δ[31]*m*Y[1]*p^2 + δ[32]*m*Y23
Y[13] := Y[1] = 1
Find(Y23, Y33) → [-0.77985577101; -0.719250799482]
Y23 := -0.77985577101
Y33 := -0.719250799482
# Проверим условие ортогональности :
sqrt(m)*Y[11]*(sqrt(m)*Y[12]) + m*Y21*Y22 + m*(Y31*Y32) = 0.50957  # выполняется
