# Задача 4
# Исходные данные:
m := 9
l23 := 1.2
L := 4.3
d := 49*10^-3
l01 := 1.2
D := 210*10^-3
l12 := 0.8
G := 79.3*10^9
# Задание : | определить частоту крутильных колебаний
# Решение :
θd := m*D^2/16 = 0.0248062
# полярный момент инерции вала
lp := π*d^4/32
# жесткость вала
c[12] := G*lp/l12 = 56100.6
c[23] := G*lp/l23 = 37400.4
Ф1 := 1
Given
0 - p^2*θd*Ф1 + c[12]*(Ф1 - Ф2) == 0
-c[12]*(Ф1 - Ф2) - p^2*θd*Ф2 + c[23]*(Ф2 - Ф3) == 0
-c[23]*(Ф2 - Ф3) - p^2*θd*Ф3 + 0 == 0
Find(Ф2, Ф3, p) → [
    1.0, -1.54858377035, 0.215250437022, 0.215250437022, -1.54858377035;
    1.0, 0.548583770355, -1.21525043702, -1.21525043702, 0.548583770355;
    0, 2400.78133428, -1332.19773379, 1332.19773379, -2400.78133428
]
P1n := 2400.78  # рад/с
P2n := 1332.20  # рад/с
