# Задача 5
# Исходные данные:
ω := 62.8  # рад/с  # (10*Гц)
P[3] := 1  # Н  # disabled  # величина вынуждающей силы
E := 2*10^11
# Собственные частоты:
p_1 := 5  # рад/с
Y_11 := 1
Y_12 := 1
Y_13 := 1
p_2 := 25  # рад/с
Y_21 := 1.37
Y_22 := -0.63
Y_23 := -0.7799
Y_31 := 1.18
Y_32 := -0.067
Y_33 := -0.7193
p_3 := 45  # рад/с
Jxx := 2.198*10^-7
# Задание:
# Определить частоту вынужденных колебаний (вынуждающая сила приложена к третьему диску)
l_01 := 1.1
l_12 := 0.77
# Решение:
l_23 := 1.1
# 1 способ
# Найдем коэффициент динамичности
λ_1 := 1/(1 - (ω/p_1)^2) = -0.00637944
λ_2 := 1/(1 - (ω/p_2)^2) = -0.188319
λ_3 := 1/(1 - (ω/p_3)^2) = -1.05533
# Амплитуды (из задачи по определению частот собственных колебаний):
u_11 := Y_11
u_21 := Y_21
u[31] := Y_31
u_12 := Y_12
u_22 := Y_22
u[32] := Y_32
u_13 := Y_13
u_23 := Y_23
u[33] := Y_33
# Обобщенные массы:
M[1] := m*(u[11]^2 + u[21]^2 + u[31]^2) = 1.3924 m  # кг
M[2] := m*(u[12]^2 + u[22]^2 + u[32]^2) = 0.004489 m  # кг
M[3] := m*(u[13]^2 + u[23]^2 + u[33]^2) = 0.517392 m  # кг
# Определим главные координаты:
q[1] := λ_1*P[3]*u[31]/(M[1]*p_1^2) = -0.000216252 1/m
q[2] := λ_2*P[3]*u[32]/(M[2]*p_2^2) = 0.00449717 1/m
q[3] := λ_3*P[3]*u[33]/(M[3]*p_3^2) = 0.000724521 1/m
# Находим формы вынужденных колебаний:
y[1] := q[1]*u[11] + q[2]*u[12] + q[3]*u[13] = 0 1/m  # м
y[2] := q[1]*u[21] + q[2]*u[22] + q[3]*u[23] = 0 1/m  # м
y[3] := q[1]*u[31] + q[2]*u[32] + q[3]*u[33] = -0.00107764 1/m  # м
# 2 способ
# Податливости системы:
δ[11] := l_01^2*(L - l_01)^2*P[3]/(3*E*Jxx*L)  # error: Значение имеет единицы измерения: Unitless, а должно иметь единицы измерения: объем.
δ[12] := l_01^2*(L - l[01])^2*P[3]/(6*E*Jxx*L)*(2*(L - l[01] - l[12])/(L - l[01]) + (L - l[01] - l[12])/l[01] - (L - l[01] - l[12])^3/(l[01]*(L - l[01])^2))
δ[13] := l_01^2*(L - l[01])^2*P[3]/(6*E*Jxx*L)*(2*(L - l[01] - l[12] - l[23])/(L - l[01]) + (L - l[01] - l[12] - l[23])/l[01] - (L - l[01] - l[12] - l[23])^3/(l[01]*(L - l[01])^2))
δ[22] := (l_01 + l_12)^2*(L - l[01] - l[12])^2*P[3]/(3*E*Jxx*L)
δ[21] := (l_01 + l_12)^2*(L - l[01] - l[12])^2*P[3]/(6*E*Jxx*L)*(2*l[01]/(l[01] + l[12]) + l[01]/(L - l[01] - l[12]) - l[01]^3/((l[01] + l[12])^2*(L - l[01] - l[12])))
δ[23] := (l_01 + l_12)^2*(L - l[01] - l[12])^2*P[3]/(6*E*Jxx*L)*(2*(L - l[01] - l[12] - l[23])/(L - l[01] - l[12]) + (L - l[01] - l[12] - l[23])/(l[01] + l[12]) - (L - l[01] - l[12] - l[23])^3/((l[01] + l[12])*(L - l[01] - l[12])^2))
δ[33] := (l_01 + l_12 + l_23)^2*(L - l[01] - l[12] - l[23])^2*P[3]/(3*E*Jxx*L)
δ[31] := (l_01 + l_12 + l_23)^2*(L - l[01] - l[12] - l[23])^2*P[3]/(6*E*Jxx*L)*(2*l[01]/(l[01] + l[12] + l[23]) + l[01]/(L - l[01] - l[12] - l[23]) - l[01]^3/((l[01] + l[12] + l[23])^2*(L - l[01] - l[12] - l[23])))
δ[32] := (l_01 + l_12 + l_23)^2*(L - l[01] - l[12] - l[23])^2*P[3]/(6*E*Jxx*L)*(2*(l[01] + l[12])/(l[01] + l[12] + l[23]) + (l[01] + l[12])/(L - l[01] - l[12] - l[23]) - (l[01] + l[12])^3/((l[01] + l[12] + l[23])^2*(L - l[01] - l[12] - l[23])))
Given
det([
    δ[11]*m*ω^2 - 1, δ[12]*m*ω^2, δ[13]*m*ω^2;
    δ[21]*m*ω^2, δ[22]*m*ω^2 - 1, δ[23]*m*ω^2;
    δ[31]*m*ω^2, δ[32]*m*ω^2, δ[33]*m*ω^2 - 1
])  # error: Эта переменная не определена.
Δ := 1.62289834901
det([
    δ[13]*P[3], δ[12]*m*ω^2, δ[13]*m*ω^2;
    δ[23]*P[3], δ[22]*m*ω^2 - 1, δ[23]*m*ω^2;
    δ[33]*P[3], δ[32]*m*ω^2, δ[33]*m*ω^2 - 1
])  # error
Δ1 := 2.37428814475e-5
det([
    δ[11]*m*ω^2 - 1, δ[13]*P[3], δ[13]*m*ω^2;
    δ[21]*m*ω^2, δ[23]*P[3], δ[23]*m*ω^2;
    δ[31]*m*ω^2, δ[33]*P[3], δ[33]*m*ω^2 - 1
])  # error
Δ2 := 2.80885352131e-5
det([
    δ[11]*m*ω^2 - 1, δ[12]*m*ω^2, δ[13]*P[3];
    δ[21]*m*ω^2, δ[22]*m*ω^2 - 1, δ[23]*P[3];
    δ[31]*m*ω^2, δ[32]*m*ω^2, δ[33]*P[3]
])  # error
Δ3 := 1.70579861286e-5
# Получим:
Y1 := Δ1/Δ = 1.46299e-5
Y2 := Δ2/Δ = 1.73076e-5
Y3 := Δ3/Δ = 1.05108e-5
